[p_1; p_2] := p^2 + 6*p + 8 solve, p → [-2; -4]
U_1 := 4
Given
U_7 := 2
u_Cпр := 0
i_Lпр := 0
[-6, -4; 2, -0]*[u_Cпр; i_Lпр] + [2, 4; 0, 0]*[U_1; U_7] == [0; 0]
[u_Cпр; i_Lпр] := Find(u_Cпр, i_Lпр) = [0; 4]
[-6, -4; 2, -0]^-1*[-16; 0] = [0; 4]
[du_C0; di_L0] := [-6, -4; 2, -0]*[0; 2] + [2, 4; 0, 0]*[4; 2] = [8; 0]
Given
u_C0 := 0
i_L0 := 2
A_uc := 0
B_uc := 0
u_C0 == A_uc + B_uc + u_Cпр
du_C0 == p_1*A_uc + p_2*B_uc
Find(A_uc, B_uc) = [4; -4]
di_L0 = 0
Given
A_iL := 0
B_iL := 0
i_L0 == A_iL + B_iL + i_Lпр
di_L0 == p_1*A_iL + p_2*B_iL
Find(A_iL, B_iL) = [-4; 2]
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ORIGIN := 0
Эйлер
# Число шагов
N := 30
# Начальные условия
Uc[0] := 0
IL[0] := 2
dUc[0] := 8
dIL[0] := 0
# Исследуемый отрезок
x_min := 0
x_max := 3
# Шаг интегрирования
h := (x_max - x_min)/N = 0.1
# Исследуемые функции
dUc(Uc, IL) := -6*Uc - 4*IL + 2*4 + 4*2
dIL(Uc, IL) := 2*Uc
i := 1 .. N + 1
# Уравнения по методу Эйлера
x[i] := x_min + i*h
[Uc[i]; IL[i]] := [Uc[i - 1] + h*dUc(Uc[i - 1], IL[i - 1]); IL[i - 1] + h*dIL(Uc[i - 1], IL[i - 1])]
Uc_solved[i] := 4*e^(-2*(i*h)) - 4*e^(-4*(i*h))
IL_solved[i] := 4 - 4*e^(-2*(i*h)) + 2*e^(-4*(i*h))
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